// COMSOL Multiphysics 6.1.0.252 model "chip_cavity_bottom.mph"
// Outline of the model tree

Parameters
  chip_h = 280[um]
  chip_w = 0.7[cm]
  chip_d = 0.7[cm]
  cav_a = 0.6[cm]
  cav_b = 0.4[cm]
  sub_h = 254[um]
  sub_w = chip_w+0.3[cm]
  air_h = 0.2[cm]

Geometry
  geom1 "Geometry 1" (3D, length unit mm)
    blk1: Block "Chip" | size = {chip_w, chip_d, chip_h}
    blk2: Block | pos = {chip_w/2-cav_a/2, chip_d/2-cav_a/2, -cav_b}; size = {cav_a, cav_a, cav_b}
    wp1: WorkPlane (disabled) | unite = on
      sq1: Square | pos = {chip_w/2-cav_w/2, chip_d/2-cav_d/2}; size = cav_w
    fin: Finalize "Form Union"

Materials
  mat1: Common "Sapphire Material 1" (disabled) on domains 1
    def "Basic"
      relpermeability = 1
      electricconductivity = 0
      relpermittivity = 11.5
  mat2: Common "Air" on domains 2
    def "Basic"
      thermalexpansioncoefficient = alpha_p(pA,T)
      molarmass = 0.02897[kg/mol]
      bulkviscosity = muB(T)
      relpermeability = 1
      relpermittivity = 1
      dynamicviscosity = eta(T)
      ratioofspecificheat = 1.4
      electricconductivity = 0[S/m]
      heatcapacity = Cp(T)
      density = rho(pA,T)
      thermalconductivity = k(T)
      soundspeed = cs(T)
      eta: Piecewise | arg = T; pieces = {200.0, 1600.0, -8.38278E-7+8.35717342E-8*T^1-7.69429583E-11*T^2+4.6437266E-14*T^3-1.06585607E-17*T^4}; argunit = K; fununit = Pa*s
      Cp: Piecewise | arg = T; pieces = {200.0, 1600.0, 1047.63657-0.372589265*T^1+9.45304214E-4*T^2-6.02409443E-7*T^3+1.2858961E-10*T^4}; argunit = K; fununit = J/(kg*K)
      rho: Analytic | expr = pA*0.02897/R_const[K*mol/J]/T; args = {pA, T}; fununit = kg/m^3; argunit = {Pa, K}
      k: Piecewise | arg = T; pieces = {200.0, 1600.0, -0.00227583562+1.15480022E-4*T^1-7.90252856E-8*T^2+4.11702505E-11*T^3-7.43864331E-15*T^4}; argunit = K; fununit = W/(m*K)
      cs: Analytic | expr = sqrt(1.4*R_const[K*mol/J]/0.02897*T); args = T; fununit = m/s; argunit = K
      an1: Analytic | funcname = alpha_p; expr = -1/rho(pA,T)*d(rho(pA,T),T); args = {pA, T}; fununit = 1/K; argunit = {Pa, K}
      an2: Analytic "Analytic 2a" | funcname = muB; expr = 0.6*eta(T); args = T; fununit = Pa*s; argunit = K
    RefractiveIndex
      n = 1
      ki = 0
    NonlinearModel
      BA = (def.gamma+1)/2
    idealGas
      Rs = R_const/Mn
      heatcapacity = Cp(T)
      ratioofspecificheat = 1.4
      molarmass = 0.02897
      Cp: Piecewise | arg = T; pieces = {200.0, 1600.0, 1047.63657-0.372589265*T^1+9.45304214E-4*T^2-6.02409443E-7*T^3+1.2858961E-10*T^4}; argunit = K; fununit = J/(kg*K)
  mat3: Common "RO4350B™ Laminates" on no domains
    def "Basic"
      electricconductivity = 0
      relpermeability = 1
    LossTangentDF "Loss tangent, dissipation factor"
      tanDelta = tanDelta_interp(freq/1[Hz])
      epsilonPrim = 3.48
      int1: Interpolation | funcname = tanDelta_interp; table = {{2.5e9, 0.0031}, {10e9, 0.0037}}; extrap = linear
  mat5: Common "Silicon" on domains 1
    def "Basic"
      relpermeability = 1
      electricconductivity = 1e-12[S/m]
      thermalexpansioncoefficient = 2.6e-6[1/K]
      heatcapacity = 700[J/(kg*K)]
      relpermittivity = 11.7
      density = 2329[kg/m^3]
      thermalconductivity = 130[W/(m*K)]
    Enu "Young's modulus and Poisson's ratio"
      E = 170e9[Pa]
      nu = 0.28
    RefractiveIndex
      n = 3.48
      ki = 0

Physics
  emw: ElectromagneticWaves "Electromagnetic Waves, Frequency Domain" on all domains
    dependent variable E = {Ex, Ey, Ez}
    wee1: WaveEquationElectric (default)
    pec1: PerfectElectricConductor (default)
    init1: init "Initial Values 1" (default)

Mesh
  mesh1 "Mesh 1" (physics-controlled)
    size: MeshSizeDefault | hauto = 2

Studies
  std1 "Study 1"
    param: Parametric "Parametric Sweep" (disabled) | pname = cav_a; plistarr = 0.3,0.6,0.9; punit = cm
    eig: Eigenfrequency | shift = 30[GHz]; conrad = 1; linpsolnum = auto

Solver configurations
  sol1 "Solution 1" (study std1)
    v1: Variables "Dependent Variables 1"
    e1: Eigenvalue "Eigenvalue Solver 1"
      d1: Direct "Suggested Direct Solver (emw)" | linsolver = pardiso

Datasets
  dset1: Solution | solution = sol1

Derived values
  gev1: EvalGlobal "Eigenfrequencies (emw)" | data = dset1; table = tbl3; expr = {emw.freq, emw.Qfactor}; unit = {GHz, }

Tables
  tbl1: Table
    Eigenfrequency (GHz) | Frequency (GHz) | Quality factor (1)
    0+1.1308e-06i | 0 | 0
    0+6.1483e-06i | 0 | 0
    0+9.01543e-06i | 0 | 0
    3.19024e-06 | 3.19024e-06 | inf
    7.08329e-06 | 7.08329e-06 | inf
    8.68996 | 8.68996 | inf
  tbl2: Table
    cav_w (m) | lambda (GHz) | Frequency (GHz) | Quality factor (1)
    0.3 | 6.01686 | 6.01686 | inf
    0.3 | 6.01689 | 6.01689 | inf
    0.3 | 6.0181 | 6.0181 | inf
    0.3 | 6.01812 | 6.01812 | inf
    0.3 | 6.03881 | 6.03881 | inf
    0.3 | 6.0389 | 6.0389 | inf
    0.6 | 6.00239 | 6.00239 | inf
    0.6 | 6.0024 | 6.0024 | inf
    0.6 | 6.00775 | 6.00775 | inf
    0.6 | 6.00777 | 6.00777 | inf
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  tbl3: Table
    Eigenfrequency (GHz) | Frequency (GHz) | Quality factor (1)
    0+5.64455e-07i | 0 | 0
    0+5.64526e-06i | 0 | 0
    5.6509e-06 | 5.6509e-06 | inf
    12.7285 | 12.7285 | inf
    13.5436 | 13.5436 | inf
    13.549 | 13.549 | inf

Plots
  pg1: PlotGroup3D "Electric Field (emw)" | data = dset1
    mslc1: Multislice | data = dset1; expr = emw.normE
    iso1: Isosurface | data = dset1; expr = emw.normE